f_0 := 3
λ_0 := 30/f_0 = 10
Θ_07 := 2.5*deg
2*Θ_07 = 5 deg
θ_0max := 30*deg
# 2*Θ07=51*λ/L
k := 2*π/λ_0
L := 51*λ_0/(2*Θ_07/deg) = 102
L/λ_0 = 10.2
dx := λ_0/(1 + |sin(θ_0max)|) = 6.66667
N := ceil(L/dx) = 16
L := (N - 1)*dx = 100
i := 0 .. N - 1
f_1(θ) := 1
θ_0 := 00*deg
X[i] := i*dx - L/2
# [component: inputs X]
# [component: outputs Pattern]
F(θ) := 1/N*sum(f_1(θ)*e^(-1i*k*X[i]*sin(θ))*e^(1i*k*X[i]*sin(θ_0)), i = 0 .. N - 1)
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